*Heading
** Job name: Job-1 Model name: dogbone
*Preprint, echo=NO, model=NO, history=NO, contact=NO
**
** PARTS
**
*Part, name=PART-1
*Node
1,        -57.5,         -9.5,           0.
2,        -57.5,         -9.5,           4.
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*Element, type=C3D8
1,  104,  527, 1477,  487,    1,   41,  397,   68
2,  527,  528, 1478, 1477,   41,   42,  398,  397
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*Elset, elset=ASTM_DUMBBELL_3D_ALIGNED-1__PICKEDSET19, generate
1,  2050,     1
** Section: Section-1-ASTM_DUMBBELL_3D_ALIGNED-1__PICKEDSET19
*Solid Section,                      elset=ASTM_DUMBBELL_3D_ALIGNED-1__PICKEDSET19, MATERIAL=U1
1.,
*End Part
**
**
** ASSEMBLY
**
*Assembly, name=Assembly
**
*Instance, name=PART-1-1, part=PART-1
*End Instance
**
*Nset, nset=ASTM_DUMBBELL_3D_ALIGNED-1__PICKEDSET19, instance=PART-1-1, generate
1,  2772,     1
*Nset, nset=MEASUREMENT_NODES, instance=PART-1-1
1057, 1068, 1069, 1080
*Nset, nset=ASTM_DUMBBELL_3D_ALIGNED-1_CLAMPED_END, instance=PART-1-1
1,    2,    3,    4,    5,    6
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*Elset, elset=ASTM_DUMBBELL_3D_ALIGNED-1_CLAMPED_END, instance=PART-1-1, generate
1,  300,    1
*Nset, nset=ASTM_DUMBBELL_3D_ALIGNED-1_PULLED_END, instance=PART-1-1
25,   26,   27,   28,   37,   38
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*Elset, elset=ASTM_DUMBBELL_3D_ALIGNED-1_PULLED_END, instance=PART-1-1, generate
1751,  2050,     1
*Nset, nset=_PickedSet10, internal, instance=PART-1-1
25,   26,   27,   28,   37,   38
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*Nset, nset=_PickedSet11, internal, instance=PART-1-1
25,   26,   27,   28,   37,   38
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*End Assembly
*Amplitude, name=Amp-1
0., 0., 10., 10.
**
** MATERIALS
**
** -----------------------------------------------------------------------------
*MATERIAL,NAME=U1
*USER MATERIAL,TYPE=mechanical,constants=50
11,1434.5,10001.909,3.24,0.27,58300.0,0.18,37.15,
0.00052,7.63,64.8,26.748,141.80,0.108,9350.3,0.0,
0.0,0.0,2155.15,1104.15,0.61,64.94,1.87,132.52,
3.13,0.28,15.6,156.0,1560.0,15600.0,156000.0,1560000.0,
15600000.0,156000000.0,50.18,30.72,0.30,1.14,78.32,2.09,
3475.95,13.76,3.38,33.8,338.0,3380.0,33800.0,338000.0,
3380000.0,33800000.0
*DEPVAR
108
*INITIAL CONDITIONS, TYPE=SOLUTION
1.0,1.0,1.0,
0.0,0.0,0.0,0.0,0.0,0.0,0.0,0.0,
0.0,0.0,0.0,0.0,0.0,0.0,0.0,0.0,
0.0,0.0,0.0,0.0,0.0,0.0,0.0,0.0,
0.0,0.0,0.0,0.0,0.0,0.0,0.0,0.0,
0.0,0.0,0.0,0.0,0.0,0.0,0.0,0.0,
0.0,0.0,0.0,0.0,0.0,0.0,0.0,0.0,
0.0,0.0,0.0,0.0,0.0,0.0,0.0,0.0,
0.0,0.0,0.0,0.0,0.0,0.0,0.0,0.0,
0.0,0.0,0.0,0.0,0.0,0.0,0.0,0.0,
0.0,0.0,0.0,0.0,0.0,0.0,0.0,0.0,
0.0,0.0,0.0,0.0,0.0,0.0,0.0,0.0,
0.0,0.0,0.0,0.0,0.0,0.0,0.0,0.0,
0.0,0.0,0.0,0.0,0.0,0.0,0.0,0.0,
0.0
** -----------------------------------------------------------------------------
**
** BOUNDARY CONDITIONS
**
** Name: Disp-BC-1 Type: Displacement/Rotation
*Boundary
ASTM_DUMBBELL_3D_ALIGNED-1_CLAMPED_END, 1, 1
ASTM_DUMBBELL_3D_ALIGNED-1_CLAMPED_END, 2, 2
ASTM_DUMBBELL_3D_ALIGNED-1_CLAMPED_END, 3, 3
** ----------------------------------------------------------------
**
** STEP: Step-1
**
*Step, name=Step-1, inc=1000, NLGEOM=YES
*Static
0.001, 0.1, 0.00001, 0.001
**
** BOUNDARY CONDITIONS
**
** Name: BC-2 Type: Displacement/Rotation
*Boundary
_PickedSet10, 2, 2
_PickedSet10, 3, 3
** Name: BC-3 Type: Displacement/Rotation
*Boundary, amplitude=Amp-1
_PickedSet11, 1, 1, 5
**
** OUTPUT REQUESTS
**
*Restart, write, number interval=1, time marks=NO
**
** FIELD OUTPUT: F-Output-1
**
*Output, field, variable=PRESELECT
**
** HISTORY OUTPUT: H-Output-1
*ELEMENT OUTPUT
SDV
*OUTPUT, FIELD, OP=NEW
*ELEMENT OUTPUT
S, LE, SDV
*NODE OUTPUT, nset=ASTM_DUMBBELL_3D_ALIGNED-1__PICKEDSET19
RF
*OUTPUT, HISTORY, OP=NEW
*NODE OUTPUT, nset=ASTM_DUMBBELL_3D_ALIGNED-1_PULLED_END
RF1
*NODEPRINT, TOTAL=yes, nset=_PICKEDSET11
RF
*End Step
